// COMSOL Multiphysics 6.3.0.290 model "GenericMSGLC.mph"
// Dimensioning a Distillation Column for Separation of Water and Ethanol
// This example shows how to make a simple model for a binary distillation process by combining functionality in the Thermodynamics node, available when licensed to the Chemical Reaction Engineering Module, and the Transport of Concentrated Species interface. In this model the separation of a nonideal mixture of ethanol and water is studied. The required equilibrium relationship is generated using the Equilibrium Calculation functionality available when using the Thermodynamics node. The model is used to find the optimal design of the column in terms of the length of the stripping and rectifying sections to meet a set of specified distillate and bottoms compositions.
// Outline of the model tree

Parameters
  P = 150000  // Pressure parameter
  A = pi*(R)^2  // Column cross-sectional area
  R = 0.03  // Column radius
  H = 2  // Total column height
  Hs = H-1E-2[m]  // Height of stripping section
  Hr = H-Hs  // Height of rectifying section
  uV = Vs/A*T/288.15[K]*1E5[Pa]/P  // Vapor velocity
  MMLiPb = 173 [g/mol]
  rhoLiPb = (10520.35-1.19*T[1/K])[kg/m^3]
  uLs = Ls[mol/s]/cLiPb/A[m^2]  // Liquid velocity stripping
  c_in = 1.512549533021668
  G_L = 1.6666666666666667E-6
  aaa = G_L/A*T/288.15[K]*1E5[Pa]/P
  K_H = 1.512549533021668E-4
  ad = uV/aaa
  T = 673[K]  // Temperature parameter
  Ls = 12.48488888888889  // Liquid rate stripping
  Vs = 2.777777777777778E-5  // Vapor rate stripping
  Kl_a = 0.01
  cLiPb = rhoLiPb/MMLiPb
  c2_in = 1.609260759249226

Variables
  var1 "Variables 1"
    alpha = cLiPb^2/K_H^2/P*1[Pa]
    cgastol = (max(c2,0)*R_const*T*K_H/1[Pa])
    c_out = at0(H,c)
  var2 "Variables 2" on boundaries 3
    c_out_b = c

Couplings
  aveop1: Average on boundaries 3
  aveop2: Average on boundaries 1

Geometry
  geom1 "Geometry 1(1D)" (1D, length unit m)
    i1: Interval | coord = {0, Hs}
    i2: Interval | coord = {Hs, H}
    fin: Finalize "Form Union"

Materials
  mat1: Common "LiPb" on all domains
    def: def "Basic"
      density = 1E4

Physics
  tds: DilutedSpecies "Transport of Diluted Species Liquid" on all domains
    dependent variable c
    ShapeProperty.order_concentration = 2
    ShapeProperty.boundaryFluxSmooth_concentration = 0
    SpeciesActivity.SpeciesActivity = Ideal
    MassConsistentStabilization.massStreamlineDiffusion = 0
    MassConsistentStabilization.massCrosswindDiffusion = 0
    MassConsistentStabilization.Residual = FullResidual
    AdvancedSettings.ConvectiveTerm = cons
    cdm1: Fluid "Transport Properties 1" (default) | u = {uLs, 0, 0}; D_c = 0[m^2/s]
    nflx1: NoFlux (default)
    init1: init "Initial Values 1" (default)
    reac1: Reactions (disabled) on domains 1, 2 | R_c_src = userdef; R_c = Kya*(ym1-ye1)
    out1: Outflow on boundaries 3
    in1: Inflow on boundaries 1 | c0 = c_in
    reac2: Reactions on domains 1, 2 | R_c_src = userdef; R_c = nojac(min(0,-Kl_a*(c-cgastol)))
    gconstr1: GlobalConstraint | constraintExpression = c>0
    ge1: GlobalEquations
      name = eff
      equation = eff-(1-c_out/c_in)
      valueType = complex
      DependentVariableQuantity = dimensionless
      CustomDependentVariableUnit = m
      SourceTermQuantity = dimensionless
      CustomSourceTermUnit = m
      fieldName = ODE1
  tds2: DilutedSpecies "Transport of Diluted Species Gas" on all domains
    dependent variable c2
    ShapeProperty.order_concentration = 2
    ShapeProperty.boundaryFluxSmooth_concentration = 0
    MassConsistentStabilization.massStreamlineDiffusion = 0
    MassConsistentStabilization.massCrosswindDiffusion = 0
    MassConsistentStabilization.Residual = FullResidual
    AdvancedSettings.ConvectiveTerm = cons
    cdm1: Fluid "Transport Properties 1" (default) | u = {-uV, 0, 0}; D_c2 = 0[m^2/s]
    nflx1: NoFlux (default)
    init1: init "Initial Values 1" (default)
    out1: Outflow on boundaries 1
    in1: Inflow on boundaries 3 | c0 = c2_in
    reac1: Reactions (disabled) on domains 1, 2 | R_c2 = -Kya*(ym1-ye1)
    reac2: Reactions on domains 1, 2 | R_c2 = nojac(max(0,Kl_a*(c-cgastol)))
    gconstr1: GlobalConstraint | constraintExpression = c2>0

Mesh
  mesh1 "Mesh 1"
    size: MeshSizeDefault | hmax = 0.0158; hauto = 1
    dis1: Distribution on domains 1
      type = predefined
      elemcount = 1000
      elemratio = 100
      growthrate = exponential
      symmetric = on
    edg2: Edge on remaining entities
    edg1: Edge (disabled) on remaining entities
      size1: Size on boundaries 1-3 | table = cfd; hauto = 1

Studies
  std2 "Column Design"
    param1: Parametric "Parametric Sweep 1" (disabled) | pname = H; plistarr = range(0.1,0.1,1.4)
    param: Parametric "Parametric Sweep" (disabled)
    stat: Stationary | stol = 1E-4; pname = H; plistarr = range(5,1,30)

Solver configurations
  sol2 "Solution 2" (study std2)
    v1: Variables "Dependent Variables 1"
    s1: Stationary "Stationary Solver 1" | stol = 1E-4
      fc1: FullyCoupled | linsolver = d1; initstep = 0.01; minstep = 1.0E-6; maxiter = 5000
      d1: Direct "Direct, concentrations (tds) (merged)" | pivotperturb = 1.0E-13

Datasets
  dset2: Solution | solution = sol2

Derived values
  gev1: EvalGlobal "Global Evaluation 1"
    data = dset2
    table = tbl2
    expr = {(x_in-aveop1(xm1))/x_in*100, aveop2(ym1)*1E4}

Tables
  tbl1: Table
    // Global Evaluation 1
  tbl2: Table
    // Global Evaluation 1
    x_in | Ls (mol/s) | Vs (mol/s) | Kl_a | (x_in-aveop1(xm1))/x_in*100 (1) | aveop2(ym1)*1E4 (1)
    6.86e-06 | 6.99 | 0.000607 | 0.00164789 | 2.20289 | 8.70112
    5.56e-06 | 6.99 | 0.00259 | 0.00650164 | 8.41196 | 6.31131
    5.26e-06 | 2.6 | 0.000682 | 0.00260248 | 9.0164 | 9.0402
    5.7e-06 | 3.18 | 0.00138 | 0.00392956 | 11.0167 | 7.23507
    5.17e-06 | 1.16 | 0.00124 | 0.000772388 | 6.10437 | 1.47617
  tbl3: Table
    // Global Evaluation: Global Evaluation 2 {gev2}
    State variable eff (1)
    0.929525
  tbl4: Table
    // Global Evaluation: Global Evaluation 2 {gev2}
    H | State variable eff (1)
    0.1 | 0.0846936
    0.2 | 0.13101
    0.3 | 0.157828
    0.4 | 0.173873
    0.5 | 0.18366
    0.6 | 0.189702
    0.7 | 0.193458
    0.8 | 0.195804
    0.9 | 0.197273
    1 | 0.198195
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
Plots
  pg9: PlotGroup1D "Operating Lines" | data = dset2; xlabel = x1; ylabel = y1
    lngr1: LineGraph | data = dset2; expr = ye1; xdata = expr; xdataexpr = xm1; legends = Column operation
    lngr2: LineGraph (disabled) on all domains | expr = ym1; xdata = expr; xdataexpr = xm1; legends = Column operation
    lngr3: LineGraph on all domains
      expr = (aveop1(xm1)-xm1)*(-uLs/uV)
      xdata = expr
      xdataexpr = xm1
      legends = Column operation
  pg3: PlotGroup1D "Concentration, E (tcs)" | data = dset2; prefixintitle = Species E:; typeintitle = off
    lngr1: LineGraph | expr = c; xdata = expr; xdataexpr = x
    lngr2: LineGraph | expr = c2; xdata = expr; xdataexpr = x
  pg10: PlotGroup1D "Concentration (tds)" | data = dset2; typeintitle = off
    lngr1: LineGraph | expr = (x_in-xm1)*LonG; xdata = expr; xdataexpr = x
    lngr2: LineGraph | expr = ym1; xdataexpr = x
  pg11: PlotGroup1D "Concentration (tds2)" | data = dset2; typeintitle = off
    lngr1: LineGraph (disabled) | expr = c2; xdata = expr; xdataexpr = x
      col1: Color "Color Expression 1" | expr = Kl_a
    lngr3: LineGraph (disabled) | expr = c; xdata = expr; xdataexpr = x
      col1: Color "Color Expression 1" | expr = Kl_a
    lngr4: LineGraph | expr = cgastol; xdata = expr; xdataexpr = x
      col1: Color "Color Expression 1" | expr = Kl_a
  pg12: PlotGroup1D "Concentration (tds2) 1" | data = dset2; typeintitle = off; xlabel = Column height (m)
    lngr1: LineGraph | expr = -tds.R_c; xdataexpr = x
      col1: Color "Color Expression 1" | expr = Kl_a
  pg13: PlotGroup1D "Verifica conservazione" | data = dset2; typeintitle = off
    lngr1: LineGraph (disabled) | expr = c2; xdata = expr; xdataexpr = x
    lngr2: LineGraph (disabled) | expr = ye1; xdata = expr; xdataexpr = x
    lngr3: LineGraph (disabled) | expr = c; xdata = expr; xdataexpr = x
    lngr4: LineGraph | expr = c2; xdataexpr = c2
    lngr5: LineGraph | expr = -uLs/uV*(aveop1(c)-c); xdataexpr = c2
  pg14: PlotGroup1D "Operating Lines Pressure" | data = dset2; xlabel = x1; ylabel = y1
    lngr1: LineGraph | data = dset2; expr = c; xdataexpr = xm1; legends = Column operation
    lngr2: LineGraph (disabled) on all domains | expr = ym1; xdata = expr; xdataexpr = xm1; legends = Column operation
    lngr3: LineGraph (disabled) on all domains | expr = cgastol; xdata = expr; xdataexpr = xm1; legends = Column operation
  pg15: PlotGroup1D "Concentration (tds2) 2" | data = dset2; typeintitle = off
    lngr1: LineGraph (disabled) | expr = c2; xdata = expr; xdataexpr = x
    lngr2: LineGraph (disabled) | expr = ye1; xdata = expr; xdataexpr = x
    lngr3: LineGraph | expr = c; xdata = expr; xdataexpr = x
    lngr4: LineGraph | expr = cgastol; xdata = expr; xdataexpr = x
    ptgr1: PointGraph | expr = c
  pg18: PlotGroup1D "1D Plot Group 18" | data = none
    tblp1: Table "Table Graph 1" | table = tbl4
  pg19: PlotGroup2D "2D Plot Group 19" | data = none
    tbls1: TableSurface | table = tbl4; xaxisdata = H